<?xml version="1.0"?>

<!--
  File:     cesaroni_l1720_engine.xml
  Description: Cesaroni L1720 solid rocket motor - Optimized for realistic performance

  Specifications:
  - Total impulse: 1720 N⋅s (386 lbf⋅s)
  - Burn time: ~3.2 seconds
  - Average thrust: 538 N (121 lbf)
  - Peak thrust: ~700 N (157 lbf)
  - Propellant mass: 1.77 kg (3.9 lbs)
  - ISP: ~220 seconds
-->

<rocket_engine name="cesaroni_l1720_engine">
    <isp>220.0</isp>
    <builduptime>0.1</builduptime>
    <variation>
        <thrust>0.02</thrust>
        <total_isp>0.00</total_isp>
    </variation>
    <thrust_table name="propulsion/thrust_prop_remain" type="internal">
        <tableData>
            0.000   157.0   <!-- 0.0 lbs burned: Peak thrust at ignition -->
            0.200   155.0   <!-- 0.2 lbs burned: Early burn -->
            0.400   150.0   <!-- 0.4 lbs burned: High initial thrust -->
            0.600   145.0   <!-- 0.6 lbs burned -->
            0.800   140.0   <!-- 0.8 lbs burned -->
            1.000   135.0   <!-- 1.0 lbs burned -->
            1.200   130.0   <!-- 1.2 lbs burned -->
            1.400   125.0   <!-- 1.4 lbs burned -->
            1.600   120.0   <!-- 1.6 lbs burned: Mid-burn -->
            1.800   118.0   <!-- 1.8 lbs burned -->
            2.000   115.0   <!-- 2.0 lbs burned -->
            2.200   112.0   <!-- 2.2 lbs burned -->
            2.400   108.0   <!-- 2.4 lbs burned -->
            2.600   105.0   <!-- 2.6 lbs burned -->
            2.800    95.0   <!-- 2.8 lbs burned -->
            3.000    80.0   <!-- 3.0 lbs burned -->
            3.200    60.0   <!-- 3.2 lbs burned -->
            3.400    30.0   <!-- 3.4 lbs burned -->
            3.600    10.0   <!-- 3.6 lbs burned: Final tail-off -->
            3.700     5.0   <!-- 3.7 lbs burned: Very low thrust -->
            3.800     1.0   <!-- 3.8 lbs burned: Minimal residual -->
            3.900     0.1   <!-- 3.9 lbs burned: Complete burnout -->
            3.950     0.0   <!-- 3.95 lbs burned: Safety margin -->
            4.000     0.0   <!-- 4.0 lbs burned: Safety margin -->
            4.200     0.0   <!-- 4.2 lbs burned: Safety margin -->
            4.500     0.0   <!-- 4.5 lbs burned: Extended safety -->
            5.000     0.0   <!-- 5.0 lbs burned: Maximum safety -->
            6.000     0.0   <!-- 6.0 lbs burned: Maximum safety -->
            8.000     0.0   <!-- 8.0 lbs burned: Ultimate safety -->
            10.000    0.0   <!-- 10.0 lbs burned: Ultimate safety -->
        </tableData>
    </thrust_table>
</rocket_engine>
