<?xml version="1.0"?>
<rocket_engine name="L1720">
    <thrust_table>
        <independentVar lookup="row">time</independentVar>
        <tableData>
            0.0 0.0
            0.05 400.0
            0.10 420.0
            0.30 430.0
            0.60 410.0
            1.00 390.0
            1.50 380.0
            2.00 350.0
            2.20 0.0
        </tableData>
    </thrust_table>
    <max_thrust unit="LBS">430.0</max_thrust>
    <isp unit="SEC">220.0</isp>
    <fuel_mass unit="LBS">3.9</fuel_mass>
    <oxidizer_mass unit="LBS">0.0</oxidizer_mass>
    <mixture_ratio>0.0</mixture_ratio>
    <thrust_variation>0.0</thrust_variation>
    <total_isp_variation>0.0</total_isp_variation>
</rocket_engine>
