<?xml version="1.0"?>
<?xml-stylesheet type="text/xsl" href="http://jsbsim.sourceforge.net/JSBSim.xsl"?>
<fdm_config name="SolidRocketMotor" version="0.1" release="ALPHA"
    xmlns:xsi="http://www.w3.org/2001/XMLSchema-instance"
    xsi:noNamespaceSchemaLocation="http://jsbsim.sourceforge.net/JSBSim.xsd">
  <engine name="SolidRocketMotor">
    <thrust-table>
      <thrust-point>
        <mach>0.0</mach>
        <altitude>0.0</altitude>
        <thrust>1000.0</thrust>
      </thrust-point>
    </thrust-table>
  </engine>
</fdm_config>
